# OpenSim document version 40500
MarkerSet:
  Marker IJ: torso (0.04613309 0.3805049 -0.002022517)
  Marker PX: torso (0.1203003 0.2293784 0.0009941508)
  Marker RightSC: torso (0.04147856 0.3901712 0.0249634)
  Marker LeftSC: torso (0.04147856 0.3901712 -0.0249634)
  Marker C7: torso (-0.07028862 0.4194889 -0.003453284)
  Marker T8: torso (-0.09988168 0.2348113 -0.001065249)
  Marker RightAC: torso (0.008338778 0.4192838 0.1372447)
  Marker RightScapSpine: torso (-0.05461275 0.4022014 0.1165061)
  Marker RightAA: torso (-0.01041968 0.4148074 0.1709747)
  Marker LeftAC: torso (0.008338778 0.4192838 -0.1372447)
  Marker LeftScapSpine: torso (-0.05461275 0.4022014 -0.1165061)
  Marker LeftAA: torso (-0.01041968 0.4148074 -0.1709747)
  Marker RightHumLatProx: humerus_r (0.02641732 -0.08539917 0.02900361)
  Marker RightHumPostProx: humerus_r (-0.02620423 -0.0544455 0.003879741)
  Marker RightHumLatDist: humerus_r (0.01777031 -0.2429819 0.04144897)
  Marker RightHumPostDist: humerus_r (-0.02921941 -0.2241783 -0.0043168)
  Marker RightEL: humerus_r (-0.002959747 -0.2868826 0.04339827)
  Marker RightEM: humerus_r (0.008709974 -0.2789889 -0.04427692)
  Marker RightRS: radius_r (-0.02774894 -0.2262878 0.03222273)
  Marker RightRSProx: radius_r (-0.02774097 -0.1746223 0.02979317)
  Marker RightUS: radius_r (-0.0277418 -0.2221069 -0.00284247)
  Marker RightUSProx: radius_r (-0.02773011 -0.1609392 -0.01597229)
  Marker LeftHumLatProx: humerus_l (0.02641732 -0.08539917 -0.02900361)
  Marker LeftHumPostProx: humerus_l (-0.02620423 -0.0544455 -0.003879741)
  Marker LeftHumLatDist: humerus_l (0.01777031 -0.2429819 -0.04144897)
  Marker LeftHumPostDist: humerus_l (-0.02921941 -0.2241783 -0.0043168)
  Marker LeftEL: humerus_l (-0.002959747 -0.2868826 -0.04339827)
  Marker LeftEM: humerus_l (0.008709974 -0.2789889 0.04427692)
  Marker LeftRS: radius_l (-0.02774894 -0.2262878 -0.03222273)
  Marker LeftRSProx: radius_l (-0.02774097 -0.1746223 -0.02979317)
  Marker LeftUS: radius_l (-0.0277418 -0.2221069 0.00284247)
  Marker LeftUSProx: radius_l (-0.02773011 -0.1609392 0.01597229)
