# OpenSim document version 40500
MarkerSet:
  Marker WEBCAM_JOINT_RIGHT_SHOULDER: torso (0.002082963 0.3805049 0.1663641) fixed=true
  Marker WEBCAM_JOINT_LEFT_SHOULDER: torso (0.002082963 0.3805049 -0.1685795) fixed=true
  Marker WEBCAM_JOINT_RIGHT_ELBOW: humerus_r (0.002986736 -0.3039638 -0.0001900588) fixed=true
  Marker WEBCAM_JOINT_LEFT_ELBOW: humerus_l (0.002986736 -0.3039638 0.0001900588) fixed=true
  Marker WEBCAM_JOINT_LEFT_WRIST: radius_l (-0.002654144 -0.232617 -0.01309663) fixed=true
  Marker WEBCAM_JOINT_RIGHT_WRIST: radius_r (0.002654144 -0.232617 0.01309663) fixed=true
  Marker WEBCAM_JOINT_RIGHT_HIP: pelvis (-0.07924701 -0.06191198 0.1219) fixed=true
  Marker WEBCAM_JOINT_LEFT_HIP: pelvis (-0.07924701 -0.06191198 -0.1219) fixed=true
  Marker WEBCAM_JOINT_RIGHT_PINKY: hand_r (-0.003878492 -0.05992715 -0.0290769) fixed=true
  Marker WEBCAM_JOINT_LEFT_PINKY: hand_l (-0.003878492 -0.05992715 0.0290769) fixed=true
  Marker WEBCAM_JOINT_RIGHT_INDEX: hand_r (0.007862132 -0.08654345 0.01798646) fixed=true
  Marker WEBCAM_JOINT_LEFT_INDEX: hand_l (0.007862132 -0.08654345 -0.01798646) fixed=true
