# OpenSim document version 40500
MarkerSet:
  Marker STEREOCAMERA_JOINT_NECK: torso (0.002082963 0.3805049 -0.002022517)
  Marker STEREOCAMERA_JOINT_RIGHT_CLAVICLE: torso (-0.002082963 0.3805049 0.08857389)
  Marker STEREOCAMERA_JOINT_LEFT_CLAVICLE: torso (-0.002082963 0.3805049 -0.0836228)
  Marker STEREOCAMERA_JOINT_RIGHT_SHOULDER: torso (0.002082963 0.3805049 0.1663641)
  Marker STEREOCAMERA_JOINT_LEFT_SHOULDER: torso (0.002082963 0.3805049 -0.1685795)
  Marker STEREOCAMERA_JOINT_RIGHT_ELBOW: humerus_r (0.002986736 -0.3039638 -0.0001900588)
  Marker STEREOCAMERA_JOINT_LEFT_ELBOW: humerus_l (0.002986736 -0.3039638 0.0001900588)
  Marker STEREOCAMERA_JOINT_LEFT_WRIST: radius_l (-0.002654144 -0.232617 -0.01309663)
  Marker STEREOCAMERA_JOINT_RIGHT_WRIST: radius_r (0.002654144 -0.232617 0.01309663)
  Marker STEREOCAMERA_JOINT_LEFT_HAND: hand_l (0.008398389 -0.1161708 0.001678194)
  Marker STEREOCAMERA_JOINT_RIGHT_HAND: hand_r (0.008398389 -0.1161708 0.001678194)
  Marker STEREOCAMERA_JOINT_SPINE_3: torso (0.01802709 0.2505628 -0.002022517)
  Marker STEREOCAMERA_JOINT_SPINE_2: torso (0.01992965 0.1006202 -0.002022517)
  Marker STEREOCAMERA_JOINT_SPINE_1: torso (0.03078109 -0.02692036 -0.002022517)
  Marker STEREOCAMERA_JOINT_PELVIS: pelvis (-0.07924701 -0.06029909 -0.002319379)
  Marker STEREOCAMERA_JOINT_RIGHT_HIP: pelvis (-0.07924701 -0.06191198 0.1219)
  Marker STEREOCAMERA_JOINT_LEFT_HIP: pelvis (-0.07924701 -0.06191198 -0.1219)
