# OpenSim document version 40500
ScaleTool Rajagopal_2015_scaled:
  mass: 60 [kg]
  height: 1720
  age: 27
  sex: Female
  notes: No notes
  GenericModelMaker:
    model_file: ../../OpenSim/Models/Rajagopal/Rajagopal_2015.osim
    marker_set_file: ../../OpenSim/Models/Rajagopal/webcam_markers.xml
  ModelScaler:
    apply: true
    marker_file: ../recordings/skeleton_ZED_2i_keypoints_subject00_static.trc
    time_range: -1 -1
    preserve_mass_distribution: true
    output_model_file: Models/Rajagopal/Scaled_Rajagopal.osim
  MarkerPlacer:
    apply: false
    marker_file: ../recordings/skeleton_ZED_2i_keypoints_subject00_static.trc
    time_range: 1.749044e9 1.749044e9
    max_marker_movement: -1
    IKTaskSet:
      IKMarkerTask JOINT_RIGHT_PINKY: apply=true weight=1
      IKMarkerTask JOINT_LEFT_PINKY: apply=true weight=1
      IKMarkerTask JOINT_RIGHT_INDEX: apply=true weight=1
      IKMarkerTask JOINT_LEFT_INDEX: apply=true weight=1
      IKMarkerTask JOINT_RIGHT_SHOULDER: apply=true weight=1
      IKMarkerTask JOINT_LEFT_SHOULDER: apply=true weight=1
      IKMarkerTask JOINT_RIGHT_ELBOW: apply=true weight=1
      IKMarkerTask JOINT_LEFT_ELBOW: apply=true weight=1
      IKMarkerTask JOINT_LEFT_WRIST: apply=true weight=1
      IKMarkerTask JOINT_RIGHT_WRIST: apply=true weight=1
      IKMarkerTask JOINT_RIGHT_HIP: apply=true weight=1
      IKMarkerTask JOINT_LEFT_HIP: apply=true weight=1
