# OpenSim document version 40500
ScaleTool Rajagopal_2015_VICON_scaled:
  mass: 100 [kg]
  height: -1
  age: -1
  sex: Female
  GenericModelMaker:
    model_file: ../../OpenSim/Models/Rajagopal/Rajagopal_2015.osim
    marker_set_file: markers_Birk_vicon.xml
  ModelScaler:
    apply: true
    scaling_order: measurements manualScale
    marker_file: recordings/subject29/vicon_static.trc
    time_range: -1 -1
    preserve_mass_distribution: true
    MeasurementSet:
      Measurement shoulders: apply=true
        MarkerPair: markers=(RightAA LeftAA)
        BodyScale pelvis: axes=(X Y Z)
        BodyScale femur_r: axes=(X Y Z)
        BodyScale tibia_r: axes=(X Y Z)
        BodyScale patella_r: axes=(X Y Z)
        BodyScale talus_r: axes=(X Y Z)
        BodyScale calcn_r: axes=(X Y Z)
        BodyScale toes_r: axes=(X Y Z)
        BodyScale femur_l: axes=(X Y Z)
        BodyScale tibia_l: axes=(X Y Z)
        BodyScale patella_l: axes=(X Y Z)
        BodyScale talus_l: axes=(X Y Z)
        BodyScale calcn_l: axes=(X Y Z)
        BodyScale toes_l: axes=(X Y Z)
        BodyScale torso: axes=(X Y Z)
      Measurement humerus_r: apply=true
        MarkerPair: markers=(RightHumLatProx RightHumLatDist)
        BodyScale humerus_r: axes=(X Y Z)
      Measurement humerus_l: apply=true
        MarkerPair: markers=(LeftHumLatProx LeftHumLatDist)
        BodyScale humerus_l: axes=(X Y Z)
      Measurement radius_r: apply=true
        MarkerPair: markers=(RightEL RightUSProx)
        BodyScale ulna_r: axes=(X Y Z)
        BodyScale radius_r: axes=(X Y Z)
        BodyScale hand_r: axes=(X Y Z)
      Measurement radius_l: apply=true
        MarkerPair: markers=(LeftEL LeftUSProx)
        BodyScale ulna_l: axes=(X Y Z)
        BodyScale radius_l: axes=(X Y Z)
        BodyScale hand_l: axes=(X Y Z)
    ScaleSet:
      Scale: scales=(1 1 1) segment=humerus_r apply=true
  MarkerPlacer:
    apply: true
    marker_file: recordings/subject29/vicon_static.trc
    time_range: -1 -1
    max_marker_movement: -1
    IKTaskSet:
      IKMarkerTask IJ: apply=true weight=1
      IKMarkerTask PX: apply=true weight=1
      IKMarkerTask RightSC: apply=true weight=1
      IKMarkerTask LeftSC: apply=true weight=1
      IKMarkerTask C7: apply=true weight=1
      IKMarkerTask T8: apply=true weight=1
      IKMarkerTask RightAC: apply=true weight=1
      IKMarkerTask RightScapSpine: apply=true weight=1
      IKMarkerTask RightAA: apply=true weight=1
      IKMarkerTask LeftAC: apply=true weight=1
      IKMarkerTask LeftScapSpine: apply=true weight=1
      IKMarkerTask LeftAA: apply=true weight=1
      IKMarkerTask RightHumLatProx: apply=true weight=1
      IKMarkerTask RightHumPostProx: apply=true weight=1
      IKMarkerTask RightHumLatDist: apply=true weight=1
      IKMarkerTask RightHumPostDist: apply=true weight=1
      IKMarkerTask RightEL: apply=true weight=1
      IKMarkerTask RightEM: apply=true weight=1
      IKMarkerTask RightRS: apply=true weight=1
      IKMarkerTask RightRSProx: apply=true weight=1
      IKMarkerTask RightUS: apply=true weight=1
      IKMarkerTask RightUSProx: apply=true weight=1
      IKMarkerTask LeftHumLatProx: apply=true weight=1
      IKMarkerTask LeftHumPostProx: apply=true weight=1
      IKMarkerTask LeftHumLatDist: apply=true weight=1
      IKMarkerTask LeftHumPostDist: apply=true weight=1
      IKMarkerTask LeftEL: apply=true weight=1
      IKMarkerTask LeftEM: apply=true weight=1
      IKMarkerTask LeftRS: apply=true weight=1
      IKMarkerTask LeftRSProx: apply=true weight=1
      IKMarkerTask LeftUS: apply=true weight=1
      IKMarkerTask LeftUSProx: apply=true weight=1
