# OpenSim document version 40500
ScaleTool Rajagopal_2015-scaled:
  mass: 60 [kg]
  height: 1720
  age: 27
  sex: Female
  notes: No notes
  GenericModelMaker:
    model_file: ../../OpenSim/Models/Rajagopal/Rajagopal_2015.osim
    marker_set_file: ../../OpenSim/Models/Rajagopal/webcam_markers.xml
  ModelScaler:
    apply: true
    scaling_order: measurements
    marker_file: webcam_static.trc
    time_range: -1 -1
    preserve_mass_distribution: true
    output_model_file: Models/Rajagopal/Scaled_Rajagopal.osim
    MeasurementSet:
      Measurement pelvis: apply=true
        MarkerPair: markers=(WEBCAM_JOINT_RIGHT_HIP WEBCAM_JOINT_LEFT_HIP)
        BodyScale pelvis: axes=(X Y Z)
        BodyScale femur_r: axes=(X Y Z)
        BodyScale tibia_r: axes=(X Y Z)
        BodyScale patella_r: axes=(X Y Z)
        BodyScale talus_r: axes=(X Y Z)
        BodyScale calcn_r: axes=(X Y Z)
        BodyScale toes_r: axes=(X Y Z)
        BodyScale femur_l: axes=(X Y Z)
        BodyScale tibia_l: axes=(X Y Z)
        BodyScale patella_l: axes=(X Y Z)
        BodyScale talus_l: axes=(X Y Z)
        BodyScale calcn_l: axes=(X Y Z)
        BodyScale toes_l: axes=(X Y Z)
      Measurement torso: apply=true
        MarkerPair: markers=(WEBCAM_JOINT_RIGHT_SHOULDER WEBCAM_JOINT_LEFT_SHOULDER)
        BodyScale torso: axes=(X Y Z)
      Measurement humerus_r: apply=true
        MarkerPair: markers=(WEBCAM_JOINT_RIGHT_SHOULDER WEBCAM_JOINT_RIGHT_ELBOW)
        BodyScale humerus_r: axes=(X Y Z)
        BodyScale ulna_r: axes=(X Y Z)
        BodyScale radius_r: axes=(X Y Z)
        BodyScale hand_r: axes=(X Y Z)
      Measurement humerus_l: apply=true
        MarkerPair: markers=(WEBCAM_JOINT_LEFT_SHOULDER WEBCAM_JOINT_LEFT_ELBOW)
        BodyScale humerus_l: axes=(X Y Z)
        BodyScale ulna_l: axes=(X Y Z)
        BodyScale radius_l: axes=(X Y Z)
        BodyScale hand_l: axes=(X Y Z)
  MarkerPlacer:
    apply: true
    marker_file: webcam_static.trc
    time_range: -1 -1
    max_marker_movement: -1
    IKTaskSet:
      IKMarkerTask WEBCAM_JOINT_RIGHT_SHOULDER: apply=false weight=1
      IKMarkerTask WEBCAM_JOINT_LEFT_SHOULDER: apply=false weight=1
      IKMarkerTask WEBCAM_JOINT_RIGHT_ELBOW: apply=true weight=1
      IKMarkerTask WEBCAM_JOINT_LEFT_ELBOW: apply=true weight=1
      IKMarkerTask WEBCAM_JOINT_LEFT_WRIST: apply=true weight=1
      IKMarkerTask WEBCAM_JOINT_RIGHT_WRIST: apply=true weight=1
      IKMarkerTask WEBCAM_JOINT_RIGHT_HIP: apply=true weight=1
      IKMarkerTask WEBCAM_JOINT_LEFT_HIP: apply=true weight=1
      IKMarkerTask WEBCAM_JOINT_RIGHT_PINKY: apply=false weight=1
      IKMarkerTask WEBCAM_JOINT_LEFT_PINKY: apply=false weight=1
      IKMarkerTask WEBCAM_JOINT_RIGHT_INDEX: apply=false weight=1
      IKMarkerTask WEBCAM_JOINT_LEFT_INDEX: apply=false weight=1
